import Sofa
import pouf

from pouf import robot
from pouf import rigid
from pouf import joint
from pouf import control
from pouf import script
from pouf import pose
from pouf import contact

import math
import numpy as np

from pouf import gl

# if you get errors on this import make sure pouf.gl is imported first
# (it disables error checking, which is the only way to get it working
# on my computer)
import OpenGL
from OpenGL.GL import *

path = pouf.path()

class Script:

    def __init__(self):
        self.polygon = None

    def onBeginAnimationStep(self, dt):
        self.servo.pre_step(dt)

        # obtain contact polygon
        self.active = pouf.contact.active( self.ground.node )
        self.polygon = pouf.contact.polygon( self.active )
        self.wrench = pouf.contact.wrench( self.ground.node )

        return 0

    def onEndAnimationStep(self, dt):
        self.servo.post_step(dt)
        return 0

    def reset(self):
        self.servo.reset()
        return 0

    def draw(self):

        if self.polygon != None:
            glLineWidth(2.0)
            glDisable(GL_LIGHTING)

            # (closed) polygon
            glColor([0, 1, 0] )
            hull = [ self.active[i][0] for i in self.polygon ]

            if len(hull) > 0:
                pouf.gl.line_strip( hull + [hull[0]] )

                # contact forces
                scale =  1 / (9.81 * self.servo.robot.mass)
                glColor([1, 1, 0])
                for i in range(len(self.active)):
                    (p, f) = self.active[i]
                    pouf.gl.line( p, p + scale * f )

                # cop + grf
                origin = self.active[0][0]
                delta = self.ground.node.getObject('dofs').position[0][:3] - origin

                # bring self.wrench at origin
                wrench = -self.wrench
                wrench[3:] += np.cross(delta, wrench[:3])

                cop = origin + pouf.contact.cop( wrench )

                glColor([1, 0, 0])
                pouf.gl.line( cop, cop + scale * wrench[:3] )

            glEnable(GL_LIGHTING)
            glLineWidth(1.0)

        return 0

# a simple scene demonstrating drawing, contact forces, support
# polygon, and center of pressure
def createScene(node):

    # default scene node
    scene = pouf.tool.scene( node )

    # numerical solver
    num = node.createObject('SequentialSolver',
                            iterations = 30,
                            precision = 0)
    # ground
    ground = pouf.tool.ground( scene )

    # robot
    robot = pouf.robot.Humanoid('robot')
    robot.insert( scene )

    # pid controllers
    servo = pouf.control.PID(robot)

    # setup pid gains with reasonable defaults
    pouf.pose.setup( servo )

    # set desired pose
    servo.set('pos', pouf.pose.stand( math.pi / 16 ) )

    # script
    script = Script()

    script.servo = servo
    script.ground = ground
    pouf.script.insert( node, script )

    return 0
